# 1. Функция плотности распределения Вейбулла
f(x, k, a) := (k/a)*(x/a)^(k - 1)*e^(-(x/a)^k)
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# 2. Функция распределения Вейбулла
fg(x, k, a) := 1 - e^(-(x/a)^k)
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# 3. Начальные моменты
α1(k, a) := integral(x*f(x, k, a), x = 0 .. 1000)
α2(k, a) := integral(x^2*f(x, k, a), x = 0 .. 1000)
α3(k, a) := integral(x^3*f(x, k, a), x = 0 .. 1000)
α1(0.5, 1) = 2
α2(0.5, 1) = 24
α3(0.5, 1) = 720
α1(1, 1) = 1
α2(1, 1) = 2
α3(1, 1) = 6
α1(1.5, 1) = 0.902745
α2(1.5, 1) = 1.19064
α3(1.5, 1) = 2
α1(5, 1) = 0.918169
α2(5, 1) = 0.887264
α3(5, 1) = 0.893515
# 4. Математическое ожидание
M1(k, a) := a*Γ(1 + 1/k)
M2(k, a) := α1(k, a)
M1(0.5, 1) = 2
M2(0.5, 1) = 2
M1(1, 1) = 1
M2(1, 1) = 1
M1(1.5, 1) = 0.902745
M2(1.5, 1) = 0.902745
M1(5, 1) = 0.918169
M2(5, 1) = 0.918169
M1(0.5, 8) = 16
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# 5. Мода
mode(k, a) := a*(k - 1)^(1/k)/k^(1/k)
mode(0.5, 1) = 1
mode(1, 1) = 0
mode(1.5, 1) = 0.48075
mode(5, 1) = 0.956352
# 6. Медиана
median(k, a) := a*ln(2)^(1/k)
median(0.5, 1) = 0.480453
median(1, 1) = 0.693147
median(1.5, 1) = 0.78322
median(5, 1) = 0.92932
# 7. Дисперсия
D2(k, a) := α2(k, a) - α1(k, a)^2
D(k, a) := a^2*Γ(1 + 2/k) - M1(k, a)^2
D2(0.5, 1) = 20
D(0.5, 1) = 20
D2(1, 1) = 1
D2(1.5, 1) = 0.37569
D(1, 1) = 1
D2(5, 1) = 0.04423
D(1.5, 1) = 0.37569
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D(5, 1) = 0.04423
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# 8. Среднеквадратическое отклонение
σ(k, a) := sqrt(D(k, a))
σ(0.5, 1) = 4.47214
σ(1, 1) = 1
σ(1.5, 1) = 0.612936
σ(5, 1) = 0.210309
# 9. Коэффициент асимметрии
μ3(k, a) := Γ(1 + 3/k)*a^3 - (3*M1(k, a)*σ(k, a)^2) - M1(k, a)^3
γ(k, a) := μ3(k, a)/σ(k, a)^3
γ(0.5, 1) = 6.61876
γ(1, 1) = 2
γ(1.5, 1) = 1.07199
γ(5, 1) = -0.25411
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