# Функция плотности
f(x, k, a) := (k/a)*(x/a)^(k - 1)*e^(-(x/a)^k)
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# Функция распределения вероятностей
fg(x, k, a) := 1 - e^(-(x/a)^k)
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# Математическое ожидание
M(k, a) := integral(x*f(x, k, a), x = 0 .. 1000)
Дисперсия
D(k, a) := integral(x^2*f(x, k, a), x = 0 .. 1000) - integral(x*f(x, k, a), x = 0 .. 1000)^2
СКО
σ(k, a) := sqrt(D(k, a))
n := 10000
i := 1 .. 10000
Y1 := runif(n, 0, 1)
X21 := nthroot(-1^1*ln(1 - Y1/(1*1^1)), 1)
q3d1 := (-1^1.5*ln(1 - Y1/(1.5*1^1.5)))^(2/3)
q31 := nthroot(-1^3*ln(1 - Y1/(3*1^3)), 3)
X11 := log(1 - Y1)^2
X31 := (-log(1 - Y1))^(2/3)
X12 := sort(X11)
X32 := sort(q31)
X22 := sort(X21)
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bin := 40
j := 1 .. bin + 1
lower1 := floor(min(q11))
lower2 := floor(min(X21))
lower3 := floor(min(q31))
upper1 := ceil(max(q11))
upper2 := ceil(max(X21))
upper3 := ceil(max(q31))
h1 := (upper1 - lower1)/bin
h2 := (upper2 - lower2)/bin
h3 := (upper3 - lower3)/bin
int1[j] := lower1 + h1*j
int2[j] := lower2 + h2*j
int3[j] := lower3 + h3*j
t1 := hist(int1, q11)/(n*h1)
t2 := hist(int2, X21)/(n*h2)
t3 := hist(int3, q31)/(n*h3)
int1 := int1 + h1/2
int2 := int2 + h2/2
int3 := int3 + h3/2
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m1 := sum(X12[i], i = 0 .. n - 1)/n
m2 := sum(X22[i], i = 0 .. n - 1)/n
m3 := sum(X32[i], i = 0 .. n - 1)/n
m1 = 0.400066
m2 = 1.02557
m3 = 0.54029
M(1, 1) = 1
M(0.5, 1) = 2
M(3, 1) = 0.89298
d1 := sum(X12[i]^2, i = 0 .. n - 1)/n - (sum(X12[i], i = 0 .. n - 1)/n)^2
d2 := sum(X22[i]^2, i = 0 .. n - 1)/n - (sum(X22[i], i = 0 .. n - 1)/n)^2
d3 := sum(X32[i]^2, i = 0 .. n - 1)/n - (sum(X32[i], i = 0 .. n - 1)/n)^2
d1 = 0.778731
d2 = 1.06932
d3 = 0.0220458
D(1, 1) = 1
D(3, 1) = 0.105333
D(0.5, 1) = 20
Cko1 := sqrt(d1)
Cko2 := sqrt(d2)
Cko3 := sqrt(d3)
Cko1 = 0.882458
Cko2 = 1.03408
Cko3 = 0.148478
σ(0.5, 1) = 4.47214
σ(1, 1) = 1
σ(1.5, 1) = 0.612936
