# Функция плотности распределения Вейбулла
f(x, k, a) := (k/a)*(x/a)^(k - 1)*e^(-(x/a)^k)
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# Функция распределения Вейбулла
fg(x, k, a) := 1 - e^(-(x/a)^k)
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# Математическое ожидание
M1(k, a) := a*Γ(1 + 1/k)
# Дисперсия
D1(k, a) := a^2*Γ(1 + 2/k) - M1(k, a)^2
CKO
σ(k, a) := sqrt(D1(k, a))
n := 10000
i := 1 .. n
a := 0
b := 1
Y1 := runif(n, a, b)
G1(i, j) := root(fg(x, 0.5, 1) - Y1[i], x, 0, 100)
G2(i, j) := root(fg(x, 1, 1) - Y1[i], x, 0, 100)
X11 := matrix(n, 1, G1)
X12 := matrix(n, 1, G2)
X21 := sort(X11)
X22 := sort(X12)
G3(i, j) := root(fg(x, 1.5, 1) - Y1[i], x, 0, 100)
X13 := matrix(n, 1, G3)
X23 := sort(X13)
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bin := 40
j := 1 .. bin + 1
lower1 := floor(min(X11))
lower2 := floor(min(X12))
lower3 := floor(min(X13))
upper1 := ceil(max(X11))
upper2 := ceil(max(X12))
upper3 := ceil(max(X13))
h1 := (upper1 - lower1)/bin
h2 := (upper2 - lower2)/bin
h3 := (upper3 - lower3)/bin
int1[j] := lower1 + h1*j
int2[j] := lower2 + h2*j
int3[j] := lower3 + h3*j
t1 := hist(int1, X11)/(n*h1)
t2 := hist(int2, X12)/(n*h2)
t3 := hist(int3, X13)/(n*h3)
int1 := int1 + h1/2
int2 := int2 + h2/2
int3 := int3 + h3/2
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# Математическое ожидание
m1 := sum(X21[i], i = 0 .. n - 1)/n
m2 := sum(X22[i], i = 0 .. n - 1)/n
m3 := sum(X23[i], i = 0 .. n - 1)/n
m1 = 2.12111
m2 = 1.02557
m3 = 0.916424
M1(0.5, 1) = 2
M1(1, 1) = 1
M1(1.5, 1) = 0.902745
Дисперсия
d1 := sum(X21[i]^2, i = 0 .. n - 1)/n - (sum(X21[i], i = 0 .. n - 1)/n)^2
d2 := sum(X22[i]^2, i = 0 .. n - 1)/n - (sum(X22[i], i = 0 .. n - 1)/n)^2
d3 := sum(X23[i]^2, i = 0 .. n - 1)/n - (sum(X23[i], i = 0 .. n - 1)/n)^2
d1 = 21.8901
d2 = 1.06931
d3 = 0.394692
D1(0.5, 1) = 20
D1(1, 1) = 1
D1(1.5, 1) = 0.37569
СКО
Cko1 := sqrt(d1)
Cko2 := sqrt(d2)
Cko3 := sqrt(d3)
Cko1 = 4.67868
Cko2 = 1.03407
Cko3 = 0.628245
σ(0.5, 1) = 4.47214
σ(1, 1) = 1
σ(1.5, 1) = 0.612936
