N0 := 10000
Y := runif(N0, 0, 1)
X(b, c) := (-1*c^b*ln(1 - Y))^(1/b)
X1 := sort(X(1, 15))
X2 := sort(X(1, 20))
X3 := sort(X(1, 25))
N1(t) :=
    i ← 0
    while t > X1[i]
        i ← i + 1
    N0 - i
N2(t) :=
    j ← 0
    while t > X2[j]
        j ← j + 1
    N0 - j
N3(t) :=
    k ← 0
    while t > X3[k]
        k ← k + 1
    N0 - k
h := 0.5
T3max := round(max(X3)/h, 0)
T1max := round(max(X1)/h, 0)
T2max := round(max(X2)/h, 0)
k := 0 .. T3max
i := 0 .. T1max
j := 0 .. T2max
T[k] := k*h
T[i] := i*h
T[j] := j*h
k := 0 .. T3max - 1
i := 0 .. T1max - 1
j := 0 .. T2max - 1
P2[j] := N2(T[j])/N0
P3[k] := N3(T[k])/N0
P1[i] := N1(T[i])/N0
P2[T2max] := 0
P3[T3max] := 0
P1[T1max] := 0
f(t, b, c) := b/c*(t/c)^(b - 1)*e^(-(t/c)^b)
Q(t, b, c) := integral(f(t, b, c), t = 0 .. t)
P(t, b, c) := 1 - Q(t, b, c)
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Q1[i] := (N0 - N1(T[i]))/N0
Q2[j] := (N0 - N2(T[j]))/N0
Q3[k] := (N0 - N3(T[k]))/N0
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i := 0 .. T1max - 2
j := 0 .. T2max - 2
k := 0 .. T3max - 2
f1[i] := (N1(T[i]) - N1(T[i] + h))/(N0*h)
f2[j] := (N2(T[j]) - N2(T[j] + h))/(N0*h)
f3[k] := (N3(T[k]) - N3(T[k] + h))/(N0*h)
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i := 0 .. T1max - 2
j := 0 .. T2max - 2
k := 0 .. T3max - 2
λ1[i] := (N1(T[i]) - N1(T[i] + h))/(N1(T[i])*h)
λ2[j] := (N2(T[j]) - N2(T[j] + h))/(N2(T[j])*h)
λ3[k] := (N3(T[k]) - N3(T[k] + h))/(N3(T[k])*h)
λ(t, b, c) := f(t, b, c)/P(t, b, c)
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