n := 24
ORIGIN := 1
t := rexp(n, 1)
t := sort(t)
D := 24
K := 0.892
i := 1 .. n
Given
n/D - sum(K^(i - 1)*t[i], i = 1 .. n) == 0
t = [0.0115581; 0.0451021; 0.132425; 0.194996; 0.244215; 0.341793; 0.50789; 0.536133; 0.617406; 0.631743; 0.654165; 0.772031; 0.796763; 1.04894; 1.19077; 1.64339; 1.74796; 1.79427; 1.91519; 2.12796; 2.39239; 2.86372; 4.71916; 6.66998]
sum((i - 1)/K, i = 1 .. n) - D*sum((i - 1)*K^(i - 2)*t[i], i = 1 .. n) == 0
[K1; D1] := Minerr(K, D)
K1 = 0.245899
D1 = 6590.06
j := 1 .. n
λ[j] := D*K^(j - 1)
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λ = [24; 21.408; 19.0959; 17.0336; 15.1939; 13.553; 12.0893; 10.7836; 9.619; 8.58015; 7.65349; 6.82692; 6.08961; 5.43193; 4.84528; 4.32199; 3.85522; 3.43885; 3.06746; 2.73617; 2.44067; 2.17707; 1.94195; 1.73222]
m[j] := 1/λ[j]
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λ[n + 1] := D*K^n
λ[n + 1] = 1.54514
m[n + 1] := 1/λ[n + 1]
m[n + 1] = 0.647191
